<?xml version="1.0" encoding="UTF-8"?>
<Node name="Root" gravity="0 -15 0" dt="0.05">
        <RequiredPlugin pluginName="CollisionAlgorithm"/>
        <RequiredPlugin pluginName="ConstraintGeometry"/>
		<RequiredPlugin name='SofaConstraint'/>
		<RequiredPlugin name='SofaSparseSolver'/>
		<RequiredPlugin name='SofaGeneralLoader'/>
		<RequiredPlugin name='SofaSimpleFem'/>
		<RequiredPlugin name='SofaTopologyMapping'/>
		<RequiredPlugin name='SofaOpenglVisual'/>

        <VisualStyle displayFlags="showVisualModels hideBehaviorModels showCollisionModels hideMappings hideForceFields showWireframe showInteractionForceFields" />
        <FreeMotionAnimationLoop name="CollisionAnimationLoop"/>
        <GenericConstraintSolver maxIterations="200" tolerance="0.0001" />

        <CollisionLoop />
        <FindClosestProximityAlgorithm name="algo" from="@Liver/Collision/AABB" dest="@Plane/AABB" />


<!--         <NormalFilter name="normal" algo="@algo" angle="-1 0.5" /> -->
<!--         <DistanceFilter name="distance" algo="@algo" distance="0.1" /> -->
<!--         <AABBSearchMethod algo="@algo" /> -->
<!--        <FindClosestPointAlgorithm name="algo" filters="@distance @normal" distance="@dist.distance" dest="@Liver/Collision/TriangleGeometry" from="@Plane/TriangleGeometry" />-->

        <Node name="Liver">
                <EulerImplicit name="EulerImplicit" rayleighMass="0.1" rayleighStiffness="0.1" />
                <SparseLDLSolver />

                <MeshGmshLoader name="loader" filename="mesh/liver.msh"/>
                <MeshTopology name="Topology" tetrahedra="@loader.tetrahedra" />
                <MechanicalObject name="State3D" position="@loader.position" rest_position="@loader.position"/>

                <TetrahedronFEMForceField name="TetrahedronFEMForceField" poissonRatio="0.4" youngModulus="50" />

                <UniformMass name="UniformMass" totalMass="1"/>

                <Node name="Collision">
                        <TriangleSetTopologyContainer name="Container" position="@../loader.position"   />
                        <TriangleSetTopologyModifier name="Modifier"/>
                        <Tetra2TriangleTopologicalMapping input="@../Topology" output="@Container" flipNormals="false"/>
                        <MechanicalObject name="state" />

                        <TriangleGeometry name="Geometry" color="0 1 0 1" />
                        <PhongTriangleNormalHandler geometry="@Geometry" />

<!--                        <PointGeometry name="Geometry" color="0 0 1 1" drawRadius="0.1" />-->
<!--                        <BezierTriangleGeometry name="Geometry" color="0 0 1 1" />-->

                        <AABBGeometry name="AABB" geometry="@Geometry" nbox="8 8 8" />

                        <BarycentricMapping name="BarycentricMapping"/>
                </Node>

                <Node name="Surface">
                        <MeshObjLoader name="loader" filename="mesh/liver-smooth.obj"/>
                        <MeshTopology name="Topology1" triangles="@loader.triangles" />
                        <OglModel name="OglModel" color="0 1 0"  src='@loader'/>
                        <BarycentricMapping name="BarycentricMapping"/>
                </Node>

                <LinearSolverConstraintCorrection />
        </Node>

        <Node name="Plane">
                <MeshObjLoader name="loader" filename="mesh/box_inside.obj"/>
                <MeshTopology name="Topology1" triangles="@loader.triangles" />
                <MechanicalObject name="State3D1" dy="1" position="@loader.position" />
                <OglModel name="OglModel" color="1 1 1 0.8"/>
                <TriangleGeometry name="Geometry" color="1 1 1 0.6" />
                <PhongTriangleNormalHandler geometry="@Geometry" />

                <AABBGeometry name="AABB" geometry="@Geometry" nbox="8 8 8" color="1 0 0 0.3" />
        </Node>

<!--         <SecondNormalDirection name="dir" /> -->
        <ConstraintUnilateral name="constraint" input="@algo.output" mu="0.6" />
<!--        <TestConstraintBilateral name="test" />-->
<!--		<ConstraintBilateral input="@algo.output" />-->
<!--	<Constraintless algo="@algo" from="@Liver/Collision/TriangleGeometry" dest="@Plane/TriangleGeometry" />-->

</Node>
